*Heading
** Job name: Job_Mesh6_Bias_0-5 Model name: Model-1
** Generated by: Abaqus/CAE 2016
*Preprint, echo=NO, model=NO, history=NO, contact=NO
**
** PARTS
**
*Part, name=ASTMmodel-1
*End Part
**
**
** ASSEMBLY
**
*Assembly, name=Assembly
**
*Instance, name=ASTMmodel-1-1, part=ASTMmodel-1
3.41068750991032, -10.5976117929871, -11.4824266914838
3.41068750991032, -10.5976117929871, -11.4824266914838, 3.46909879051356, -9.8554260953639, -12.1500706743133, 13.4459728326858
*Node
      1,   12.1746359,           0.,   7.27215338
      2,   14.1453009,  -6.83062315,   2.32616854
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*Element, type=C3D10
   1, 2704, 2705, 2706, 2707, 5576, 5575, 5574, 5578, 5577, 5579
   2, 2708, 2709, 2710, 2705, 5582, 5581, 5580, 5584, 5583, 5585
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*Nset, nset=Set-1, generate
     1,  39322,      1
*Elset, elset=Set-1, generate
     1,  25627,      1
** Section: Section-1
*Solid Section, elset=Set-1, material=Steel
,
*End Instance
**
*Nset, nset=Set-1, instance=ASTMmodel-1-1
     3,     4,     6,     9,    10,    12
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*Elset, elset=Set-1, instance=ASTMmodel-1-1, generate
  2518,  11876,      1
*Nset, nset=Set-2, instance=ASTMmodel-1-1
     3,     4,     6,     9,    10,    12
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*Elset, elset=Set-2, instance=ASTMmodel-1-1, generate
  2518,  11876,      1
*Nset, nset=Set-3, instance=ASTMmodel-1-1
 26,
*End Assembly
**
** MATERIALS
**
*Material, name=Steel
*Elastic
113700., 0.3
** ----------------------------------------------------------------
**
** STEP: Step-1
**
*Step, name=Step-1, nlgeom=NO, perturbation
*Static
**
** BOUNDARY CONDITIONS
**
** Name: BC-1 Type: Displacement/Rotation
*Boundary
Set-2, 1, 1
Set-2, 2, 2
Set-2, 3, 3
**
** LOADS
**
** Name: Load-1   Type: Concentrated force
*Cload
Set-3, 1, 2300.
**
** OUTPUT REQUESTS
**
**
** FIELD OUTPUT: F-Output-1
**
*Output, field, variable=PRESELECT
**
** HISTORY OUTPUT: H-Output-1
**
*Output, history, variable=PRESELECT
*End Step
